# Расчет валов (решение задачи)
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# A | B
F_t1 := 1616.283  # H
L_1 := 0.067  # м
F_r1 := 295.674  # H
L_2 := 0.066  # м
F_a1 := 1307.342  # H
L_3 := 0.037  # м
F_m := 589.801  # H
d := 0.045779  # м
d = 0.045779
m_a := F_a1*d/2 = 29.9244  # Hм
T := 43.162  # Hм
# Опорные реакции и изгибающие моменты в вертикальной плоскости
# sum(M_A)=F_r1*(L_2 + L_3) - R_BВ*L_2 - m_a=0
R_BВ := (F_r1*(L_2 + L_3) - m_a)/L_2 = 8.03057  # H
# sum(M_B)=F_r1*L_3 + R_AВ*L_2 - m_a=0
R_AВ := (-F_r1*L_3 + m_a)/L_2 = 287.643  # H
# Проверка:
# sum(F_y)=R_BВ + R_AВ - F_r1 = 5.68434e-14
# Изгибающие моменты:
# M(0)= 0 | H*м
# M(L_1)1=0 | H*м
# M(L_1)2=-R_AВ*0 = 0 | H*м
# M(L_1 + L_2)1=-R_AВ*L_2 = -18.9845 | H*м
# M(L_1 + L_2)2=-R_AВ*L_2 - R_BВ*0 = -18.9845 | H*м
# M(L_1 + L_2+L_3)=-R_AВ*(L_2 + L_3) - R_BВ*L_3 = -29.9244
# Опорные реакции и изгибающие моменты в горизонтальной плоскости
# sum(M_A)=-F_t1*(L_2 + L_3) + F_m*L_1 + R_BГ*L_2=0
R_BГ := (-F_m*L_1 + F_t1*(L_2 + L_3))/L_2 = 1923.64  # H
# sum(M_B)=F_m*(L_1 + L_2) - F_t1*L_3 - R_AГ*L_2=0
R_AГ := (F_m*(L_1 + L_2) - F_t1*L_3)/L_2 = 282.44  # H
F_m*(L_1 + L_2) = 78.4435
# Проверка:
# sum(F_y)=-R_BГ - R_AГ + F_m + F_t1 = -4.54747e-13
F_t1*L_3 = 59.8025
# Изгибающие моменты:
# M(0)= 0 | H*м
# M(L_1)1=-F_m*L_1 = -39.5167 | H*м
# M(L_1)2=-F_m*L_1 + R_AГ*0 = -39.5167 | H*м
# M(L_1 + L_2)1=-F_m*(L_3 + L_2) + R_AГ*L_2 = -42.1084 | H*м
# M(L_1 + L_2)2=-F_m*(L_3 + L_2) + R_AГ*L_2 + R_BГ*0 = -42.1084
H*м
# M(L_1 + L_2+L_3)=-F_m*(L_1 + L_2 + L_3) + R_AГ*(L_2 + L_3) + R_BГ*L_3 = 1.42109e-14
H*м
# Суммарные изгибающие моменты:
M_c1 := sqrt(M_в1^2 + M_г1^2)
M_c1 := sqrt(0^2 + 0^2) = 0  # H*м
M_c2 := sqrt(M_в2^2 + M_г2^2)
M_c2 := sqrt(0^2 + (-39.517)^2) = 39.517  # H*м
M_c3 := sqrt(M_в3^2 + M_г3^2)
M_c3 := sqrt(0^2 + (-39.517)^2) = 39.517  # H*м
M_c4 := sqrt(M_в4^2 + M_г4^2)
M_c4 := sqrt((-18.984)^2 + (-42.108)^2) = 46.1896  # H*м
M_c5 := sqrt(M_в5^2 + M_г5^2)
M_c5 := sqrt((-18.984)^2 + (-42.108)^2) = 46.1896  # H*м
M_c6 := sqrt(M_в6^2 + M_г6^2)
M_c6 := sqrt((-29.924)^2 + 0^2) = 29.924  # H*м
# Эквивалентные моменты:
M_экв1 := sqrt(T^2 + M_c1^2) = 43.162  # H*м
M_экв2 := sqrt(T^2 + M_c2^2) = 58.5197  # H*м
T = 43.162
M_экв3 := sqrt(T^2 + M_c3^2) = 58.5197  # H*м
M_экв4 := sqrt(T^2 + M_c4^2) = 63.2174  # H*м
M_экв5 := sqrt(T^2 + M_c5^2) = 63.2174  # H*м
M_экв6 := sqrt(T^2 + M_c6^2) = 52.5205  # H*м
# Определяем диаметр вала в самом нагруженном сечении, где эквивалентный момент максимален M_экв4 = 63.2174H*м
σ := 60  # МПа
d_KP := nthroot(M_экв4/(0.1*σ)*1000, 3) = 21.9227  # мм
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