# Рассчет подшипников
# Задача 1
# Определить долговечность в часах радиального однорядного шарикоподшипника №312, если радиальная нагрузка на подшипник  составляет 8000 Н, частота вращения вала 500 мин^-1 , нагрузка постоянная, вращается внутреннее кольцо.
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F_a := 0  # H
R_r := 9000  # H
n_1 := 300  # мин^-1
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312
d := 60
D := 130
B := 31
C := 100
e := 0.37
# Долговечность в часах рассчитывается по формуле
L := a_1*a_2*(C/P_э)^3.33*10^6/(60*n_1) > L_треб.  # error: Эта переменная не определена. Проверьте правильность установки обозначения.
# где a_1 - коэффициент надежности. Принимаем a_1 := 1.
# a_2- обобщенный коэффициент совместного влияния качества метала и условий эксплуатации. Для роликовых подшипников рекомендуется 0,6…0,7. Принимаем a_2 := 0.6.
# L_треб. -  ресурс работы редуктора (L_треб. := L часов).
# С- паспортная динамическая грузоподъемность.
# n_3– частота вращения подвижного кольца (совпадает с частотой вращения вала).
# P_э - суммарная эквивалентная динамическая нагрузка.
# Определяем собственные осевые составляющие
R_s := 0  # H
R_a := F_a = 0  # H
# Прежде чем определять эквивалентную динамическую нагрузку,
# рассчитаем R_a/(V*R_r)соотношение  и сравним с е, где  V – коэффициент, учитывающий которое из колец подшипника вращается:
# V := 1– внутреннее кольцо.
# R_a/(V*R_r) = 0<e => X := 1Y := 0
# где X := 1 ─ коэффициент радиальной нагрузки (рекомендуется для радиальноых шарикоподшипников),
# Y ─ коэффициент осевой нагрузки (см. табл.),
# V – коэффициент, учитывающий которое из колец подшипника вращается:
# V := 1– внутреннее кольцо.
P_э := V*X*R_r*K_T*K_δ  # error: Эта переменная не определена. Проверьте правильность установки обозначения.
# K_δ := 1.2-коэффициент режима работы подшипников;
# K_T := 1- температурный коэффициент
P_э := V*X*R_r*K_T*K_δ = 10800  # H
L := a_1*a_2*(C*10^3/P_э)^3.33*10^6/(60*n_1) = 55154.1  # часов
