# Рассчет подшипников
# Задача 2
# Определить долговечность в часах радиально-упорного подшипника №7211, если радиальная нагрузка на подшипник составляет 9000 Н, осевая нагрузка – 5000 Н, е = 0,37, частота вращения внутреннего кольца 300 мин^-1. Нагружение имеет постоянный характер.
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F_a := 5000  # H
R_r := 9000  # H
n_1 := 300  # мин^-1
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7211
d := 55
D := 100
B := 21
C := 57.90
e := 0.37
Y := 1.5
# Долговечность в часах рассчитывается по формуле
L := a_1*a_2*(C/P_э)^3.33*10^6/(60*n_1) > L_треб.  # error: Эта переменная не определена. Проверьте правильность установки обозначения.
# где a_1 - коэффициент надежности. Принимаем a_1 := 1.
# a_2- обобщенный коэффициент совместного влияния качества метала и условий эксплуатации. Для роликовых подшипников рекомендуется 0,6…0,7. Принимаем a_2 := 0.6.
# С- паспортная динамическая грузоподъемность.
# n_1– частота вращения подвижного кС- паспортная динамическая грузоподъемность.ольца (совпадает с частотой вращения вала).
# P_э - суммарная эквивалентная динамическая нагрузка.
# Определяем собственные осевые составляющие
R_s := 0.83*e*R_r = 2763.9  # H
R_a := F_a - R_s = 2236.1  # H
# Прежде чем определять эквивалентную динамическую нагрузку,
# рассчитаем R_a/(V*R_r)соотношение  и сравним с е, где  V – коэффициент, учитывающий которое из колец подшипника вращается:
# V := 1– внутреннее кольцо.
# R_a/(V*R_r) = 0.248456<e => X := 1Y := 0
# где X := 1 ─ коэффициент радиальной нагрузки (рекомендуется для радиально-упорных роликовых подшипников),
# Y ─ коэффициент осевой нагрузки (см. табл.),
# V – коэффициент, учитывающий которое из колец подшипника вращается:
# V := 1– внутреннее кольцо.
P_э := V*X*R_r*K_T*K_δ  # error: Эта переменная не определена. Проверьте правильность установки обозначения.
# K_δ := 1.2-коэффициент режима работы подшипников;
# K_T := 1- температурный коэффициент.
P_э := V*X*R_r*K_T*K_δ = 10800  # H
L := a_1*a_2*(C*10^3/P_э)^3.33*10^6/(60*n_1) = 8939.17  # часов
