# Рассчет подшипников
# Задача 3
# Определить долговечность в часах радиально-упорного подшипника №6208, если радиальная нагрузка на подшипник составляет 8000 Н, осевая нагрузка – 4500Н, е = 0,36, частота вращения внутреннего кольца 250 мин^-1. Нагружение имеет постоянный характер.
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F_a := 4500  # H
R_r := 8000  # H
n_1 := 250  # мин^-1
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6208
d := 40
D := 80
B := 18
C := 32.5
e := 0.36
# Долговечность в часах рассчитывается по формуле
L := a_1*a_2*(C/P_э)^3.33*10^6/(60*n_1)  # error: Эта переменная не определена. Проверьте правильность установки обозначения.
# где a_1 - коэффициент надежности. Принимаем a_1 := 1.
# a_2- обобщенный коэффициент совместного влияния качества метала и условий эксплуатации. Для роликовых подшипников рекомендуется 0,6…0,7. Принимаем a_2 := 0.6.
# С- паспортная динамическая грузоподъемность.
# n_3– частота вращения подвижного кС- паспортная динамическая грузоподъемность.ольца (совпадает с частотой вращения вала).
# P_э - суммарная эквивалентная динамическая нагрузка.
# Определяем собственные осевые составляющие
R_s := 0.83*e*R_r = 2390.4  # H
R_a := F_a - R_s = 2109.6  # H
# Прежде чем определять эквивалентную динамическую нагрузку,
# рассчитаем R_a/(V*R_r)соотношение  и сравним с е, где  V – коэффициент, учитывающий которое из колец подшипника вращается:
# V := 1– внутреннее кольцо.
# R_a/(V*R_r) = 0.2637<e => X := 1Y := 0
# где X := 1 ─ коэффициент радиальной нагрузки (рекомендуется для радиально-упорных шариковых подшипников),
# Y ─ коэффициент осевой нагрузки (см. табл.),
# V – коэффициент, учитывающий которое из колец подшипника вращается:
# V := 1– внутреннее кольцо.
P_э := V*X*R_r*K_T*K_δ  # error: Эта переменная не определена. Проверьте правильность установки обозначения.
# K_δ := 1.2-коэффициент режима работы подшипников;
# K_T := 1- температурный коэффициент.
P_э := V*X*R_r*K_T*K_δ = 9600  # H
L := a_1*a_2*(C*10^3/P_э)^3.33*10^6/(60*n_1) = 2320.96  # часов
# Характеристики подшипника https://podshipnikinform.ru/katalog-podshipnikov-import/podshipniki-sharikovye-radialnye/podshipnik-6208-skf-obj208373.html
