# Рассчет подшипников
# Задача 4
# Определить долговечность в часах радиального однорядного шарикоподшипника №211, если радиальная нагрузка на подшипник составляет 4570 Н, осевая нагрузка – 1050 Н, частота вращения вала  100 мин^-1, нагрузка постоянная, вращается внутреннее кольцо.
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F_a := 1050  # H
R_r := 4570  # H
n_1 := 300  # мин^-1
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кH
211
d := 55
D := 100
B := 21
C := 43.6
e := 0.24
Y := 1.71
C_0 := 25
# Долговечность в часах рассчитывается по формуле
L := a_1*a_2*(C/P_э)^3.33*10^6/(60*n_1)  # error: Эта переменная не определена. Проверьте правильность установки обозначения.
# где a_1 - коэффициент надежности. Принимаем a_1 := 1.
# a_2- обобщенный коэффициент совместного влияния качества метала и условий эксплуатации. Для роликовых подшипников рекомендуется 0,6…0,7. Принимаем a_2 := 0.6.
# С- паспортная динамическая грузоподъемность.
# n_1– частота вращения подвижного кС- паспортная динамическая грузоподъемность.ольца (совпадает с частотой вращения вала).
# P_э - суммарная эквивалентная динамическая нагрузка.
# F_a/(C_0*10^3) = 0.042=>e := 0.24
# Определяем собственные осевые составляющие
R_s := 0  # H
R_a := F_a = 1050  # H
# Прежде чем определять эквивалентную динамическую нагрузку,
# рассчитаем R_a/(V*R_r)соотношение  и сравним с е, где  V – коэффициент, учитывающий которое из колец подшипника вращается:
# V := 1– внутреннее кольцо.
# R_a/(V*R_r) = 0.229759>e => X := 0.56Y := 1.71
# где X := 0.56 ─ коэффициент радиальной нагрузки (рекомендуется для радиальных шарикоподшипников),
# Y ─ коэффициент осевой нагрузки (см. табл.),
# V – коэффициент, учитывающий которое из колец подшипника вращается:
# V := 1– внутреннее кольцо.
P_э := V*X*R_r*K_T*K_δ  # error: Эта переменная не определена. Проверьте правильность установки обозначения.
# K_δ := 1.2-коэффициент режима работы подшипников;
# K_T := 1- температурный коэффициент.
P_э := V*X*R_r*K_T*K_δ = 3071.04  # H
L := a_1*a_2*(C*10^3/P_э)^3.33*10^6/(60*n_1) = 228933  # часов
