# Расчет валов (решение задачи)
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F_t1 := 1631.127  # H
L_1 := 0.125  # м
F_r1 := 1760.014  # H
L_2 := 0.201  # м
F_a := 302.388  # H
L_3 := 0.082  # м
F_t2 := 1345  # H
F_r2 := 3695  # H
d_w := 0.24  # м
m_a := F_a*d_w/2 = 36.2866  # Hм
T := F_t1*d_w/2 = 195.735  # Hм
# Опорные реакции и изгибающие моменты в вертикальной плоскости
# sum(M_A)=F_r1*L_1 + R_BВ*(L_1 + L_2) - F_r2*(L_3 + L_2 + L_1) - m_a=0
R_BВ := (F_r2*(L_3 + L_2 + L_1) - F_r1*L_1 + m_a)/(L_1 + L_2) = 4060.87  # H
# sum(M_B)=-F_r2*L_3 - F_r1*L_2 + R_AВ*(L_1 + L_2) - m_a=0
R_AВ := (F_r2*L_3 + F_r1*L_2 + m_a)/(L_1 + L_2) = 2125.89  # H
# Проверка:
# sum(F_y)=-R_BВ + R_AВ + F_r2 - F_r1=-3949.565 + 2014.579 + 3695 - 1760.014 = 0
# Изгибающие моменты:
# M(0)= 0 | H*м
# M(L_1)1=R_AВ*L_1 = 265.736 | H*м
# M(L_1)2=R_AВ*L_1 - F_r1*0 - m_a = 229.449 | H*м
# M(L_1 + L_2)1=R_AВ*(L_1 + L_2) - F_r1*L_2 - m_a = 302.99 | H*м
# M(L_1 + L_2)2=R_AВ*(L_1 + L_2) - F_r1*L_2 - R_BВ*0 - m_a = 302.99
H*м
# M(L_1 + L_2+L_3)=R_AВ*(L_1 + L_2 + L_3) - F_r1*(L_3 + L_2) - R_BВ*L_3 - m_a=867.363 - 498.084 - 332.992 - 36.287=0
H*м
# Опорные реакции и изгибающие моменты в горизонтальной плоскости
# sum(M_A)=-F_t1*L_1 + R_BГ*(L_1 + L_2) - F_t2*(L_3 + L_2 + L_1)=0
R_BГ := (F_t2*(L_3 + L_2 + L_1) + F_t1*L_1)/(L_1 + L_2) = 2308.75  # H
# sum(M_B)=-F_t2*L_3 + F_t1*L_2 - R_AГ*(L_1 + L_2)=0
R_AГ := (-F_t2*L_3 + F_t1*L_2)/(L_1 + L_2) = 667.382  # H
# Проверка:
# sum(F_y)=-R_BГ - R_AГ + F_t2 + F_t1 = 0
# Изгибающие моменты:
# M(0)= 0 | H*м
# M(L_1)1=-R_AГ*L_1 = -83.4227 | H*м
# M(L_1)2=-R_AГ*L_1 + F_t1*0 = -83.4227 | H*м
# M(L_1 + L_2)1=-R_AГ*(L_1 + L_2) + F_t1*L_2 = 110.29 | H*м
# M(L_1 + L_2)2=-R_AГ*(L_1 + L_2) + F_t1*L_2 + R_BГ*0 = 110.29
H*м
# M(L_1 + L_2+L_3)=-R_AГ*(L_1 + L_2 + L_3) + F_t1*(L_3 + L_2) - R_BГ*L_3 = 0
H*м
# Суммарные изгибающие моменты:
M_c1 := sqrt(M_в1^2 + M_г1^2)
M_c1 := sqrt(0^2 + 0^2) = 0  # H*м
M_c2 := sqrt(M_в2^2 + M_г2^2)
M_c2 := sqrt(265.736^2 + (-83.423)^2) = 278.523  # H*м
M_c3 := sqrt(M_в3^2 + M_г3^2)
M_c3 := sqrt(229.449^2 + (-83.423)^2) = 244.144  # H*м
M_c4 := sqrt(M_в4^2 + M_г4^2)
M_c4 := sqrt(302.99^2 + 110.29^2) = 322.439  # H*м
M_c5 := sqrt(M_в5^2 + M_г5^2)
M_c5 := sqrt(302.99^2 + 110.29^2) = 322.439  # H*м
M_c6 := sqrt(M_в6^2 + M_г6^2)
M_c6 := sqrt(0^2 + 0^2) = 0  # H*м
# Эквивалентные моменты:
M_экв1 := sqrt(0^2 + M_c1^2) = 0  # H*м
M_экв2 := sqrt(0^2 + M_c2^2) = 278.523  # H*м
M_экв3 := sqrt(T^2 + M_c3^2) = 312.919  # H*м
M_экв4 := sqrt(T^2 + M_c4^2) = 377.199  # H*м
M_экв5 := sqrt(T^2 + M_c5^2) = 377.199  # H*м
M_экв6 := sqrt(T^2 + M_c6^2) = 195.735  # H*м
# Определяем диаметр вала в самом нагруженном сечении, где эквивалентный момент максимален M_экв3 = 435.733H*м
T = 195.735
σ := 60  # МПа
d_KP := nthroot(M_экв4/(0.1*σ)*10, 3) = 8.56656  # мм
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# 265.736 | 302.99
229.449
110.29
-83.423
# 278.523 | 244.144 | 322.439
195.735
377.199
# 278.523 | 244.144 | 195.735
