# 2. Выбор электродвигателя и кинематический расчёт привода
# Исходные данные:
F_t := 3.2
n_вых := 150
# Ресурс привода
L_n := 12000  # часов
# 2.1. Выбор электродвигателя
η_кп := 0.97  # - КПД конической передачи с круговым зубом
η_окп := 0.96  # - КПД конической передачи с прямым зубом
η_п := 0.995  # - КПД пары подшипников качения
η_рп := 0.96  # - КПД зубчатоременной передачи
n_вых := 150  # мин^-1  # частота вращения выходного вала
P_вых := 3.5  # кВт  # мощность на выходном валу привода
η_общ := η_рп*η_окп*η_кп*η_п^3 = 0.88061
η_общ := 0.96*0.96*0.97*0.995^3 = 0.88061  # КПД привода
P_потр := P_вых/η_общ = 3.97452  # потребляемая мощность электродвигателя
i_окп1 := 2
i_кп1 := 2.8
i_рп1 := 1.7
i_общ1 := i_окп1*i_кп1*i_рп1 = 9.52
Выбираем
n := 1430  # мин^-1
P := 4  # кВт
i_общ := n/n_вых = 9.53333
i_кп := 2.8
u := 2.8
i_окп := 2
i_рп := i_общ/(i_кп*i_окп) = 1.70238
# 1. Мощности на валах привода
P_1 := 3.9745
P_2 := P_1*η_рп*η_п = 3.79644
P_3 := P_2*η_кп*η_п = 3.66414
P_4 := P_3*η_п*η_окп = 3.49998
# 2. Частоты вращения валов
n_1 := 1430
n_2 := n_1/i_рп = 840
i_рп = 1.70238
n_3 := n_2/i_кп = 300
n_4 := n_3/i_окп = 150
# 3. Вращающие моменты на валах привода
T_1 := 9550*P_1/n_1 = 26.543
T_2 := 9550*P_2/n_2 = 43.1619
T_3 := 9550*P_3/n_3 = 116.642
T_4 := 9550*P_4/n_4 = 222.832
# Тут | должна | быть | таблица | с | полученными | даными
# Расчет передач
# Расчет конической передачи:
H_колеса := 230
σ_НР := σ_Hlimb/S_H*z_w*0.9
H_шестерни := 280
c := 1
σ_Hlimb1 := 2*H_шестерни + 70 = 630
σ_Hlimb2 := 2*H_колеса + 70 = 530
N_Hlimb1 := 30*H_шестерни^2.4 = 22402709
N_Hlimb2 := 30*H_колеса^2.4 = 13972305
N_k1 := 60*c*n_2*L_n = 604800000  # циклов
n_2 = 840
N_k2 := 60*c*n_3*L_n = 216000000  # циклов
n_3 = 300
z_N1 := nthroot(N_Hlimb1/N_k1, 20) = 0.848075
z_N2 := nthroot(N_Hlimb2/N_k2, 20) = 0.872049
т.к.
Принимаем
S_H := 1.1
H_HB ≤ 350
σ_HP1 := σ_Hlimb1/S_H*z_N1*0.9 = 437.144  # МПа
σ_HP2 := σ_Hlimb2/S_H*z_N2*0.9 = 378.152  # МПа
σ_HPрасч := 0.45*(σ_HP1 + σ_HP2) = 366.883  # зн
σ_HPрасч := σ_HP2
# Расчет допускаемых напряжений изгиба на выносливость:
σ_FP := σ_Flimb/S_F*y_N*y_R*y_A
# где σ_Flimb– предел выносливости зубьев при изгибе:
σ_Flimb1 := 1.75*H_колеса = 402.5
σ_Flimb2 := 1.75*H_шестерни = 490
# S_F – коэффициент безопасности:
S_F := 1.7
# y_A=1 – коэффициент, учитывающий влияние двустороннего приложения нагрузки;
y_A := 1
# y_R – коэффициент, учитывающий шероховатость переходной поверхности зуба;
y_R := 1
# y_N – коэффициент долговечности(не менее 1):
y_N := nthroot(N_Flim/N_k, q_F)
# q_F := 9– показатель степени.
# где N_Flim := 4*10^6 циклов – базовое число циклов перемены напряжений;
y'_N1 := nthroot(N_Flim/N_k1, q_F) = 0.572569
y'_N2 := nthroot(N_Flim/N_k2, q_F) = 0.641966
# Так как y_N1 и y_N2 меньше 1, что не допустимо, принимаем их равными y_N1 := 1  y_N2 := 1
σ_FP1 := σ_Flimb1/S_F*y_N1*y_R*y_A = 236.765  # МПа
σ_FP2 := σ_Flimb2/S_F*y_N2*y_R*y_A = 288.235  # МПа
# Проектировочный расчет передач
# Вычисляем средний делительный диаметр зубчатого колеса по формуле:
d_m1 := K_d*nthroot(T_2*K_Hβ*sqrt((u^2 + 1))/(Θ_H*ψ_bd1*σ_HPрасч^2*u), 3)
# где K_d – вспомогательный коэффициент, учитывающий тип передачи:
# K_d=600МПа^1/3 для передачи с круговым зубом;
K_d := 600
# K_Hβ – коэффициент, учитывающий неравномерность распределения нагрузки по ширине зубчатого венца, принимаем равным 1;
K_Hβ := 1
σ_HPрасч = 378.152
Θ_H := 1.22 + 0.21*u = 1.808
# ψ_bd11-коэффициент ширины шестерни относительнро среднего диаметра, рекомендуется принимать ψ_bd1=0,3…0,6
ψ_bd1 := 0.4
d_m1 := K_d*nthroot(T_2*K_Hβ*sqrt((u^2 + 1))/(Θ_H*ψ_bd1*σ_HPрасч^2*u), 3) = 45.745  # мм
# Ширина зубчатого венца:
b_W := ψ_bd1*d_m1 = 18.298  # мм
β_m := 35°  # - угол наклона зубьев
# Число зубьев конической шестерни z_1= 18…32. Принимаем z_1 := 25
# Тогда
z_2 := z_1*i_кп = 70
# Принимаем z_2 := 70
# Фактическое передаточное число передачи:
u_ф := z_2/z_1 = 2.8
# Определим углы делительных конусов:
δ_2 := atan(u_ф) = 70.3462°
δ_1 := 90° - δ_2 = 19.6538°
# По рассчитанному d_m1 вычисляется внешний делительный диаметр шестерни d_e1:
d_e1 := d_m1 + b_W*sin(δ_1) = 51.8993  # мм
# Внешний делительный диаметр колеса d_e2:
d_e2 := d_e1*u = 145.318  # мм
# Внешний окружной модуль:
m_te := d_e2/z_2 = 2.07597  # мм
# Т.к. шестерня имеет консольное расположение,то рекомендуется брать не более 0,350.
K_be := 0.3
# Средний нормальный модуль:
m_nm := m_te*(1 - 0.5*K_be)*cos(35°) = 1.44546  # мм
# Округляем расчетный модуль до 1.75 по ГОСТ 9563-60
m_nm := 1.5  # мм
# Пересчитываем внешний окружной модуль
m_te := m_nm/((1 - 0.5*K_be)*cos(35°)) = 2.15431
d_e1 := m_te*z_1 = 53.8577
d_e2 := m_te*z_2 = 150.802
# Коэффициент радиального зазора:
c' := 0.25
# Коэффициент высоты головки зуба:
h'_a := 1
# Угол профиля:
α := 20°
α_n := α = 20°
# Радиальный зазор:
c := 0.25*m_nm = 0.375
# Число зубьев плоского колеса:
z_c := sqrt(z_1^2 + z_2^2) = 74.3303
# Среднее конусное расстояние:
R_m := m_nm*z_c/(2*cos(β_m)) = 68.0554
# Ширина зубчатого венца:
b_W = 18.298
0.35*R_m = 23.8194
b_W ≤ 0.35*R_m
b_W := 19
# Коэффициент смещения шестерни:
x_n1 := 2*(1 - 1/u^2)*sqrt(cos(β_m)/z_1) = 0.315851
x_1 := x_n1 = 0.315851
x_2 := -x_1 = -0.315851
# Коэффициент расчетной толщины зуба исходного контура
x_τ1 := a + b*(u - 2.5)
# Где a := 0.11, b := 0.01при β_m = 35°
x_τ1 := a + b*(u_ф - 2.5) = 0.113
x_τ2 := -x_τ1 = -0.113
# Развод резцов зуборезной головки для чистовой обработки колеса:
ω'_2 := m_nm*(0.6609 + x_τ1) = 1.16085
# Округляем до ближайшего значения ω_2 := 1 | ???
# Проверяем выполнимость условия:
0.06*m_nm ≥ ω'_2 - ω_2 ≥ -0.02*m_nm
0.06*m_nm = 0.09
-0.02*m_nm = -0.03
ω'_2 - ω_2 = 0.16085
0.12 ≥ 0.0478 ≥ -0.04  # - условие выполняется!
# Расстояние от внешнего торца до расчетного сечения:
l_e := 0.5*b_W = 9.5  # мм
d_e1 = 53.8577
R_e := d_e1/(2*sin(δ_1)) = 80.0652
δ_1 = 19.6538 deg
# Высота ножки зуба в расчетном сечении:
h_f1 := (h'_a + c' - x_n1)*m_nm = 1.40122  # мм
h_f2 := (h'_a + c' + x_n1)*m_nm = 2.34878  # мм
# Нормальная толщина зуба в расчетном сечении:
S_n1 := (0.5*π + x_n1*2*tan(α_n) + x_τ1)*m_nm = 2.87058  # мм
S_n2 := π*m_nm - S_n1 = 1.84181  # мм
R_e = 80.0652
# Сумм углов ножек шестерни и колеса в минутах:
θ_fΣ := К/(sin(β_m)*60)
d_0 := 125
K := (c_1 - c_2*R_m)/z_c
c_1 := 10800*tan(β_m)/tan(α_n) = 20777.1
c_2 := 2*c_1*sin(β_m)/d_0 = 190.676
K := (c_1 - c_2*R_m)/z_c = 104.944
sin(β_m) = 0.573576
# Принимаем K кратное 20, K := 100
θ_fΣ := K/(sin(β_m)*60) = 2.90574
# Угол ножки зуба:
θ_f1 := θ_fΣ*S_n2/(π*m_nm) = 1.1357
θ_f2 := θ_fΣ - θ_f1 = 1.77005
# Угол головки зуба:
K_a1 := 1
K_a2 := 1
θ_a1 := K_a1*θ_f2 = 1.77005
θ_a2 := K_a1*θ_f1 = 1.1357
# Увеличение высоты головки зуба при переходе от расчетного сечения на внешний торец:
Δh_ae1 := l_e*tan(θ_a1) = -47.0455  # мм
Δh_ae1 := l_e*tan(1.77*π/180) = 0.293571  # мм
Δh_ae2 := l_e*tan(θ_a2) = 20.4385  # мм
Δh_ae2 := l_e*tan(1.1357*π/180) = 0.188331
# Увеличение высоты ножки зуба при переходе от расчетного сечения на внешний торец:
Δh_fe1 := l_e*tan(θ_f1) = 20.4385  # мм
Δh_fe1 := l_e*tan(1.1357*π/180) = 0.188331  # мм
Δh_fe2 := l_e*tan(θ_f2) = -47.0455  # мм
Δh_fe2 := l_e*tan(1.77*π/180) = 0.293571  # мм
# Уменьшение высоты головки зуба в расчетном сечении:
δh_a1 := (b_W - l_e)*(tan(θ_f2) - tan(θ_a1)) = 0
δh_a1 := (b_W - l_e)*(tan(θ_f1) - tan(θ_a2)) = 0
# Высота головки зуба в расчетном сечении:
h_a1 := (h'_a + x_n1)*m_nm - δh_a1 = 1.97378  # мм
h_a2 := (h'_a - x_n1)*m_nm - δh_a1 = 1.02622  # мм
# Внешняя высота головки зуба:
h_ae1 := h_a1 + Δh_ae1 = 2.26735  # мм
h_ae2 := h_a2 + Δh_ae2 = 1.21455  # мм
# Угол конуса вершины:
δ_a1 := δ_1*180/π + θ_a1 = 21.4239
δ_a2 := δ_2*180/π + θ_a2 = 71.4819
# Угол конуса впадин:
θ_a1 = 101.416 deg
δ_f1 := δ_1*180/π - θ_f1 = 18.5181
δ_f2 := δ_2*180/π - θ_f2 = 68.5761
δ_a2 := δ_2 + θ_a2 = 135.417°
# Средний делительный диаметр:
d_1 := z_1*m_nm/cos(β_m) = 45.779  # мм
m_nm = 1.5
d_2 := z_2*m_nm/cos(β_m) = 128.181  # мм
# Расстояние от вершины конуса до плоскости внешней окружности вершин зубьев:
B_1 := 0.5*d_e2 - h_ae1*sin(δ_1) = 74.6382  # мм
B_2 := 0.5*d_e1 - h_ae2*sin(δ_2) = 25.7851  # мм
# Постоянная хорда:
S_n1 = 2.87058
S_c1 := 0.883*S_n1 = 2.53472  # мм
S_c2 := 0.883*S_n2 = 1.62632  # мм
S_n2 = 1.84181
# Высота до постоянной хорды:
h_a1 = 1.97378
h_c1 := h_a1 - 0.1607*S_n1 = 1.51248  # мм
h_c2 := h_a2 - 0.1607*S_n2 = 0.730244  # мм
# Внешний угол наклона линии зуба на делительном конусе(у торца):
β_e := β_m*(1 - K_be) = 24.5°
# Число зубьев биэквивалентного колеса:
z_V1 := z_1/(cos(δ_1)*cos(β_m)^3) = 48.2964
z_1 = 25
z_2 = 70
z_V2 := z_2/(cos(δ_2)*cos(β_m)^3) = 378.644
# Коэффициент торцового перекрытия:
ε_α := [1.88 - 3.2*(1/z_1 + 1/z_2)]*cos(β_m) = [1.39771]
# Выбираем верхние знаки, так как направление вращение рассчитываемого колеса(если смотреть на него с вершины делительного конуса) совпадает с направлением наклона линии зубьев.
#
# – окружная сила на шестерне и на колесе:
T_2 = 43.1619
d_1 = 45.779
F_t1 := 2*T_2*10^3/d_1 = 1885.66
F_t2 := F_t1 = 1885.66
# – радиальная сила на шестерне, численно равная осевой силе на колесе:
F_r1 := F_t1*(tan(α)*cos(δ_1) - sin(β_m)*sin(δ_1))/cos(β_m) = 344.953  # H
F_a2 := F_r1 = 344.953  # H
# – осевая сила на шестерне, численно равная радиальной силе на колесе:
F_a1 := F_t1*(tan(α)*sin(δ_1) + sin(β_m)*cos(δ_1))/cos(β_m) = 1525.23
F_r2 := F_a1 = 1525.23
# Проверочный расчёт передачи на контактную усталость активных поверхностей зубьев.
# Проверочный расчёт пердачи на контактную усталость активных поверхностей зубьев выполняем по условию контактной прочности:
σ_H := Z_E*Z_H*Z_ε*sqrt(ω_ht*sqrt(u^2 + 1)/(Θ_H*d_1*u))
# Θ_H- коэффициент вида конических колес
# Для колес с круговыми зубьями рекомендуется принимать в зависимости от способа упрочнения зубьев шестерни и колеса:
Θ_H := 1.22 + 0.21*u = 1.808
# где Z_E – коэффициент, учитывающий механические свойства материала сопряжённых зубчатых колёс, для данного случая Z_E := 192МПа1/2
# Z_H – коэффициент, учитывающий форму сопряжённых поверхностей зубьев в полюсе зацепления
Z_H := 2.5*cos(β_m) = 2.04788
# Z_ε – коэфицент, учитывающий суммарную длину контактных линий
Z_ε := sqrt(1/(ε_α*k_ε))
k_ε := 0.95
ε_α = [1.39771]
Z_ε := sqrt(1/(ε_α*k_ε)) = [0.867821]
# ω_ht | - удельная расчетная окружная сила
ω_ht := F_t/b_W*K_Hβ*K_HV*K_Hα
K_HV
# - коэффициент, учитывающий внутреннюю динамическую нагрузку, возникающую в зацеплении
K_HV := 1 + ω_HV/ω_HtP
# ω_HV | - удельная окружная динамическая сила
ω_HV := δ_H*g_0*υ_m*sqrt(d_1*(u + 1)/u)
δ_H := 0.002
g_0 := 5.6
υ_m2 := π*d_2/1000*n_3/60 = 2.01347  # м/с
υ_m := π*d_1/1000*n_2/60 = 2.01347  # м/с
n_2 = 840
# Принимаем 9-ую степень точности изготовления зубчатых колёс
K_Hα := 1
ω_HV := δ_H*g_0*υ_m*sqrt(d_1*(u_ф + 1)/u_ф) = 0.17775  # Н/мм
ω_HtP
# −удельная расчетная окружная сила в зоне ее наибольшей концентрации:
ω_HtP := F_t1/b_W*K_Hβ = 99.2454  # Н/мм
K_HV := 1 + ω_HV/ω_HtP = 1.00179
b_W = 19
ω_ht := F_t1/b_W*K_Hβ*K_HV*K_Hα = 99.4232  # Н/мм
K_Hβ := 1
K_A := 1
K_H := K_Hβ*K_HV*K_Hα*K_A = 1.00179
σ_H := Z_E*Z_H*Z_ε*sqrt(F_t1*K_H*sqrt(u_ф^2 + 1)/(Θ_H*d_1*u_ф*b_W)) = [385.373]
σ_HPрасч = 378.152
Δσ := |σ_HPрасч - σ_H|/σ_HPрасч*100 = 1.90951
# Условие прочности выполняется.
# Проверочный расчёт передачи на выносливость при изгибе.
σ_F1 := 2*Y_F1*Y_β*Y_ε*T_2*K_Fβ*K_Fυ*K_Fα*1000/(b_W*d_1*θ_F*m_nm)
σ_F2 := σ_F1*Y_F2/Y_F1
# Y_F- коэффициент, учитывающий форму зуба и концентрацию напряжений; принимается в зависимости от эквивалентного числа:
z_V1 = 48.2964
Y_F1 := 3.65
σ_FP1 := σ_Flimb1/S_F*y_N1*y_R*y_A = 236.765  # МПа
z_V2 = 378.644
Y_F2 := 3.6
σ_FP2 := σ_Flimb2/S_F*y_N2*y_R*y_A = 288.235  # МПа
Y_ε := 1/ε_α = [0.715457]
# Y_β– коэффициент, учитывающий наклон зуба
σ_FP1/Y_F1 = 64.867
σ_FP2/Y_F2 = 80.0654
Y_β := 1 - β_m/(120°) = 0.708333
# K_Fα - коэффициент, учитывающий распределение нагрузки между зубьями для кругового зуба передачи:
K_Fα := 1
# K_Fβ – коэффициент, учитывающий неравномерность распределения нагрузки по длине контактных линий:
K_Fβ := 1.1
# K_Fυ −коэффициент, учитывающий внутреннюю динамическую нагрузку, возникающую в зацеплении:
K_Fυ := 1.1
# W_Fυ -удельная окружная динамическая сила:
# δ_F - коэффициент, учитывающий вид зубчатой передачи и модификацию профиля
δ_F := 0.006
W_Fυ := δ_F*g_0*υ_m*sqrt(d_1*(u_ф + 1)/u_ф) = 0.533249
# Θ_F−  коэффициент вида конических колес
Θ_F := 0.94 + 0.08*u = 1.164
σ_F1 := 2*Y_F1*Y_β*Y_ε*T_2*K_Fβ*K_Fυ*K_Fα*1000/(b_W*d_1*Θ_F*m_nm) = [127.223]
σ_FP1 = 236.765
σ_F1 ≤ σ_FP1
σ_F2 := σ_F1*Y_F2/Y_F1 = [125.48]
σ_FP2 = 288.235
σ_F2 ≤ σ_FP2
# Расчет корпуса
R_e = 80.0652
# Толщина стенки корпуса и редуктора одноступенчатого конического
δ := 0.05*R_e + 1 = 5.00326  # мм
δ_1 := 0.04*R_e + 1 = 4.20261  # мм
R_e = 80.0652
# Толщина верхнего пояса фланца
b := 1.5*δ = 7.50489  # мм
# Толщина нижнего пояса (фланца) крышки корпуса
b_1 := 1.5*δ_1 = 6.30391  # мм
# Толщина нижнего пояса корпуса
# без бобышки
p := 2.35*δ = 11.7577
# при наличии бобышки???
p_1 := 1.5*δ = 7.50489
p_1 := (1.25 .. 2.75)
# Толщина рёбер основания корпуса
m := (0.85 .. 1)*δ  # error: Значение должно быть скаляром или матрицей.
m := 1*δ = 5.00326
# Толщина ребер крышки
m_1 := (0.85 .. 1)*δ_1  # error: Значение должно быть скаляром или матрицей.
m_1 := 1*δ_1 = 4.20261
# Диаметр фундаментальных болтов
d_1 := 0.072*R_e + 12 = 17.7647
# Диаметр болтов
# У подшипников
d_2 := (0.7 .. .0.75)*d_1
d_2 := 0.7*d_1 = 12.4353
# Соединяющих основания корпуса с крышкой
d_3 := (0.5 .. .0.6)*d_1
d_3 := 0.5*d_1 = 8.88235
# Крепящих смотровую крышку
d_S := (0.3 .. .0.4)*d_1
d_S := 0.3*d_1 = 5.32941
# Расстояние от наружной поверхности стенки корпуса до оси болтов d_1, d_2,  d_3
c_i := 18  # закономерности??
# Ширина нижнего и верхнего пояса основания корпуса
k_i := 33
# Размер q, определяющий положение болтов d_2
q ≥ 0.5*d_2 + d_4
# Размеры опорной поверхности D1 под головки болтов и гайки ГОСТ 12876-67
# какое брать???
# Гнездо под подшипник
# диаметр отверстия | D_П | какое брать???
# винты крепления крышки подшипника
d_4
# число винтов | n
# Размеры штифта
# диаметр
d_ш := d_3 = 8.88235
# длина
l_ш := b + b_1 + 5 = 18.8088
# Наименьший зазор между наружной поверхностью колеса и стенкой корпуса
# по диаметру
A := 1.2*δ = 6.00391
# по торцам
A_1 := δ = 5.00326
# Расчет подшипников
F_a2 = 344.953
R_r1 := sqrt(421.209^2 + 2011^2) = 2054.64
R_r2 := sqrt(841.07^2 + 4276^2) = 4357.93
S_a1 := 0.83*0.37*2055 = 631.091
S_a2 := 0.83*0.37*4358 = 1338.34
R_a2 := S_a2 = 1338.34
R_a1 := S_a2 - F_a2 = 993.388
R_a1/R_r1 = 0.483486
R_a2/R_r2 = 0.307105
P_экв1 := 1*R_r1*1*1.2 = 2465.57
P_экв2 := 1*R_r2*1*1.1 = 4793.73
L_h1 := 1*0.7*(32500/2466)^(10/3)*10^6/(60*720) = 87615.7
L_h2 := 1*0.7*(32500/4794)^(10/3)*10^6/(60*720) = 9555.03
R_r1 := sqrt(545.667^2 + 3198^2) = 3244.22
R_r2 := sqrt(876.226^2 + 4656^2) = 4737.73
S_a1 := 0.83*0.37*3244 = 996.232
S_a2 := 0.83*0.37*4738 = 1455.04
F_a2 = 344.953
R_a2 := S_a2 = 1455.04
R_a1 := S_a2 - F_a2 = 1110.09
1455 - 996.232 = 458.768
R_a1/R_r1 = 0.342174
R_a2/R_r2 = 0.307117
P_экв1 := 1*R_r1*1*1.2 = 3893.06
P_экв2 := 1*R_r2*1*1.1 = 5211.51
L_h1 := 1*0.7*(48400/3893)^(10/3)*10^6/(60*288) = 180339
L_h2 := 1*0.7*(48400/5212)^(10/3)*10^6/(60*288) = 68185.3
R_r1 := sqrt(1237^2 + 1814^2) = 2195.62
R_r2 := sqrt(637.16^2 + 3760^2) = 3813.6
S_a1 := 0.83*0.37*2196 = 674.392
S_a2 := 0.83*0.37*3814 = 1171.28
R_a2 := S_a2 = 1171.28
R_a1 := S_a2 - F_a2 = 826.326
R_a1/R_r1 = 0.376351
R_a2/R_r2 = 0.307132
P_экв1 := 1*R_r1*1*1.2 = 2634.75
P_экв2 := 1*R_r2*1*1.1 = 4194.96
L_h1 := 1*0.7*(32000/2635)^(10/3)*10^6/(60*71.62) = 670621
L_h2 := 1*0.7*(32000/4195)^(10/3)*10^6/(60*71.62) = 142333
