# 2. Выбор электродвигателя и кинематический расчёт привода
# Исходные данные:
F_t := 3.2
n_вых := 150
# Ресурс привода
L_n := 12000  # часов
# 2.1. Выбор электродвигателя
η_кп := 0.97  # - КПД конической передачи с круговым зубом
η_окп := 0.96  # - КПД конической передачи с прямым зубом
η_п := 0.995  # - КПД пары подшипников качения
η_рп := 0.96  # - КПД зубчатоременной передачи
n_вых := 150  # мин^-1  # частота вращения выходного вала
P_вых := 3.5  # кВт  # мощность на выходном валу привода
η_общ := η_рп*η_окп*η_кп*η_п^3 = 0.88061
η_общ := 0.96*0.96*0.97*0.995^3 = 0.88061  # КПД привода
P_потр := P_вых/η_общ = 3.97452  # потребляемая мощность электродвигателя
i_окп1 := 2
i_кп1 := 2.8
i_рп1 := 1.7
i_общ1 := i_окп1*i_кп1*i_рп1 = 9.52
Выбираем
n := 1430  # мин^-1
P := 4  # кВт
i_общ := n/n_вых = 9.53333
i_кп := 2.8
i_окп := 2
u := 2
i_рп := i_общ/(i_кп*i_окп) = 1.70238
# 1. Мощности на валах привода
P_1 := 3.9745
P_2 := P_1*η_рп*η_п = 3.79644
P_3 := P_2*η_кп*η_п = 3.66414
P_4 := P_3*η_п*η_окп = 3.49998
# 2. Частоты вращения валов
n_1 := 1430
n_2 := n_1/i_рп = 840
n_3 := n_2/i_кп = 300
n_4 := n_3/i_окп = 150
# 3. Вращающие моменты на валах привода
T_1 := 9550*P_1/n_1 = 26.543
T_2 := 9550*P_2/n_2 = 43.1619
T_3 := 9550*P_3/n_3 = 116.642
T_4 := 9550*P_4/n_4 = 222.832
# Тут | должна | быть | таблица | с | полученными | даными
# Расчет передач
# Расчет конической прямозубой открытой передачи:
H_колеса := 230
H_шестерни := 280
c := 1
σ_Hlimb1 := 2*H_шестерни + 70 = 630
σ_Hlimb2 := 2*H_колеса + 70 = 530
σ_НР := σ_Hlimb/S_H*z_w*0.9
N_Hlimb1 := 30*H_шестерни^2.4 = 22402709
N_Hlimb2 := 30*H_колеса^2.4 = 13972305
N_k1 := 60*c*n_3*L_n = 216000000  # циклов
N_k2 := 60*c*n_4*L_n = 108000000  # циклов
z_N1 := nthroot(N_Hlimb1/N_k1, 20) = 0.892878
z_N2 := nthroot(N_Hlimb2/N_k2, 20) = 0.902801
т.к.
Принимаем
S_H := 1.1
H_HB ≤ 350
σ_HP1 := σ_Hlimb1/S_H*z_N1*0.9 = 460.238  # МПа
σ_HP2 := σ_Hlimb2/S_H*z_N2*0.9 = 391.488
МПа
σ_HPрасч := 0.45*(σ_HP1 + σ_HP2) = 383.277  # зн
σ_HPрасч := σ_HP2
# Расчет допускаемых напряжений изгиба на выносливость:
σ_FP := σ_Flimb/S_F*y_N*y_R*y_A
# где σ_Flimb– предел выносливости зубьев при изгибе:
σ_Flimb1 := 1.75*H_колеса = 402.5
σ_Flimb2 := 1.75*H_шестерни = 490
# S_F – коэффициент безопасности:
S_F := 1.7
# y_A=1 – коэффициент, учитывающий влияние двустороннего приложения нагрузки;
y_A := 1
# y_R – коэффициент, учитывающий шероховатость переходной поверхности зуба;
y_R := 1
# y_N – коэффициент долговечности(не менее 1):
y_N := nthroot(N_Flim/N_k, q_F)
# q_F := 9– показатель степени.
# где N_Flim := 4*10^6 циклов – базовое число циклов перемены напряжений;
y'_N1 := nthroot(N_Flim/N_k1, q_F) = 0.641966
y'_N2 := nthroot(N_Flim/N_k2, q_F) = 0.693361
# Так как y_N1 и y_N2 меньше 1, что не допустимо, принимаем их равными y_N1 := 1  y_N2 := 1
σ_FP1 := σ_Flimb1/S_F*y_N1*y_R*y_A = 236.765  # МПа
σ_FP2 := σ_Flimb2/S_F*y_N2*y_R*y_A = 288.235  # МПа
# Проектировочный расчет передач
# Средний нормальный модуль рассчитывается по формуле:
m_nm := 14*nthroot(T_3*K_Hβ*Y_FS1/(0.85*ψ_bd*σ_FP1*z_1), 3)
# K_Hβ – коэффициент, учитывающий неравномерность распределения нагрузки по ширине зубчатого венца, орределяется по рис. 6.3;
K_be := 0.3  # рекомендовано
K_be*u/(2 - K_be) = 0.352941
# По графику
K_Hβ := 1.1  # Подшипники роликовые
# 𝑌𝐹𝑆 – коэффициент, учитывающий форму зуба и концентрацию напряжений (рис. 5.5, стр.59):
Y_FS1 := 3.8
# 𝜓𝑏𝑑 – коэффициент ширины колеса относительно делительного диаметра шестерни:
ψ_bd := 0.5*ψ_ba*(u + 1)
# 𝜓𝑏𝑎 – коэффициент ширины колеса относительно межосевого расстояния; принимают из стандартного ряда чисел в зависимости от положения колес относительно опор: 𝜓𝑏𝑎=0.2 ..0.25;
ψ_ba := 0.2
ψ_bd := 0.5*ψ_ba*(u + 1) = 0.3
β_m := 0  # - угол наклона зубьев
# Число зубьев конической шестерни z_1= 18…32. Принимаем z_1 := 28
# Тогда
z_2 := z_1*i_окп = 56
# Принимаем z_2 := 56
m_nm := 14*nthroot(T_3*K_Hβ*Y_FS1/(0.85*ψ_bd*σ_FP1*z_1^2), 3) = 3.04612
# Фактическое передаточное число передачи:
u_ф := z_2/z_1 = 2
Δu := (u_ф - u)/u = 0
m_n := 1.5*m_nm = 4.56918
# Внешний окружной модуль:
m_e := m_n/(1 - 0.5*K_be) = 5.37551
m_e := 5
# Внешние делительные диаметры:
d_e1 := z_1*m_e = 140
d_e2 := z_2*m_e = 280
# Выбираем ширину зацепления: 𝑏=42 ..48 мм=45 мм;
b := 45
# Определим углы делительных конусов:
δ_2 := atan(u_ф) = 63.4349°
δ_1 := 90° - δ_2 = 26.5651°
# Внешнее конусное расстояние:
R_e := d_e1/(2*sin(δ_1)) = 156.525
# Среднее конусное расстояние:
R := R_e - 0.5*b = 134.025
# Средний окружной модуль:
m := m_e*R/R_e = 4.28126
# Средний делительный диаметр
d_1 := d_e1 - b*sin(δ_1) = 119.875
d_e1 - 2*b*sin(δ_1) = 99.7508
d_2 := d_e2 - b*sin(δ_2) = 239.751
d_2 := m*z_2 = 239.751
# Коэффициент смещения шестерни:
x_n1 := 2*(1 - 1/u^2)*sqrt(cos(β_m)/z_1) = 0.283473
x_1 := x_n1 = 0.283473
x_2 := -x_1 = -0.283473
# Внешняя высота головки зуба
h_ae1 := (1 + x_1)*m_e = 6.41737  # мм
h_ae2 := (1 + x_2)*m_e = 3.58263  # мм
# Внешняя высота ножкизуба
h_fe1 := h_ae2 + 0.2*m_e = 4.58263  # мм
h_fe2 := h_ae1 + 0.2*m_e = 7.41737  # мм
# Внешняя выcота зуба
h_e1 := h_fe1 + h_ae1 = 11
h_e2 := h_fe2 + h_ae2 = 11
# Коэффициент расчетной толщины зуба исходного контура
x_τ1 := 0.03 + 0.008*(u_ф - 2.5) = 0.026
x_τ2 := -x_τ1 = -0.026
# Внешняя окружная толщина зуба
S_e1 := (0.5*π + x_1*2*tan(π/9) + x_τ1)*m_e = 9.01574
S_e2 := π*m_e - S_e1 = 6.69222
# Угол ножки зуба
θ_f1 := atan(h_fe1/R_e) = 1.67699 deg  # рад
θ_f2 := atan(h_fe2/R_e) = 2.71309 deg  # рад
# Угол головки зуба
θ_a1 := θ_f2
θ_a2 := θ_f1
# Угол конуса вершин
δ_a1 := δ_1 + θ_a1 = 29.2781 deg
δ_a1 := δ_2 + θ_a2 = 65.1119 deg
# Угол конуса впадин
δ_f1 := δ_1 - θ_f1 = 24.8881 deg
δ_f1 := δ_2 - θ_f2 = 60.7219 deg
# внешний диаметр вершин зубьев
d_ae1 := d_e1 + 2*h_ae1*cos(δ_1) = 151.48
d_ae2 := d_e2 + 2*h_ae2*cos(δ_2) = 283.204
# Проверим коэффициенты ширины венца
ψ_bR := b/R_e = 0.287494
ψ_bR < 0.3  # выполняется
# Средняя окружная скорость зубчатых колес
d_1 = 119.875
ν := π*d_1*n_3/60*0.001 = 1.883  # м/c
# Принимаем 8-ю степень точности изготовления зубчатых колес
# Определяем значения усилий в коническом зацеплении:
# – окружная сила на шестерне и колесе:
F_t1 := 2*T_3*1000/d_e1 = 1666.31  # H
T_3 = 116.642
F_t2 := F_t1
# Радиальная сила на шестерне
F_r1 := tan(π/9)*cos(δ_1)*F_t1 = 542.459  # H
F_a2 := F_t1
F_a1 := tan(π/9)*sin(δ_1)*F_t1 = 271.229  # H
F_r2 := F_a1
# Проверочный расчёт передачи на контактную усталость активных поверхностей зубьев.
# Проверочный расчёт пердачи на контактную усталость активных поверхностей зубьев выполняем по условию контактной прочности:
σ_H := Z_E*Z_H*Z_ε*sqrt(F_t1*K_Hβ*K_HV*sqrt(u^2 + 1)/(0.85*d_1*d_w*u))
# где Z_E – коэффициент, учитывающий механические свойства материала сопряжённых зубчатых колёс, для данного случая Z_E := 192МПа1/2
# Z_H – коэффициент, учитывающий форму сопряжённых поверхностей зубьев в полюсе зацепления
a_w := π/9
Z_H := sqrt(4/sin(2*a_w)) = 2.49457
# Z_ε – коэфицент, учитывающий суммарную длину контактных линий; для прямозубых Z_ε=1
Z_ε := 1
K_Hβ := 1.2
K_A := 1
δ_H := 0.06
g_0 := 6.1
ω_Hv := δ_H*g_0*ν*sqrt(d_1*(u + 1)/u) = 9.24148
ν = 1.883
d_1 = 119.875
K_HV := 1 + ω_Hv*b/(F_t1*K_A) = 1.24957
σ_H := Z_E*Z_H*Z_ε*sqrt(F_t1*K_Hβ*K_HV*sqrt(u^2 + 1)/(0.85*d_1*b*u)) = 373.847
391.488
Δσ := |σ_HPрасч - σ_H|/σ_HPрасч*100 = 4.50608
σ_HPрасч = 391.488
# Проверочный расчёт передачи на выносливость при изгибе.
σ_F := (K_F*Y_FS*Y_β*Y_ε*F_t)/(0.85*b*m)
# Коэффициент нагрузки 𝐾𝐹 вычисляют следующим образом:
K_F := K_A*K_FV*K_Fβ*K_Fα
# где K_A – коэффициент, учитывающий внешнюю динамическую нагрузку;
K_A := 1
# 𝐾𝐹𝜈 – коэффициент, учитывающий динамическую нагрузку, возникающую в зацеплении:
K_FV := 1 + ω_Fv*b/(F_t1*K_A)
# где ω_Fv – удельная окружная динамическая сила, Н/мм:
ω_Fv := δ_F*g_0*ν*sqrt(d_1*(u + 1)/u)
# 𝛿𝐹 – коэффициент, учитывающий влияние вида зубчатой передачи и модификации профиля головок зубьев (табл. 5.7, стр. 57, [1]);
δ_F := 0.016
# 𝑔0 – коэффициент, учитывающий влияние разности шагов зацепления зубьев шестерни и колеса (табл. 5.8, стр. 57, [1]);
g_0 := 6.1
ω_Fv := δ_F*g_0*ν*sqrt(d_1*(u + 1)/u) = 2.4644  # Н/мм
K_FV := 1 + ω_Fv*b/(F_t1*K_A) = 1.06655
# 𝐾𝐹𝛽 – коэффициент, учитывающий неравномерность распределения нагрузки по длине контактных линий
K_be := 0.3  # рекомендовано
K_be*u/(2 - K_be) = 0.352941
# По графику | подшипники роликовые
K_Fβ := 1.1
# 𝐾𝐹𝛼 – коэффициент, учитывающий распределение нагрузки между зубьями, для прямозубых передач
K_Fα := 1
K_F := K_A*K_FV*K_Fβ*K_Fα = 1.17321
# 𝑌𝐹𝑆 – коэффициент, учитывающий форму зуба и концентрацию напряжений; принимается в зависимости от эквивалентного числа зубьев 𝑧𝜐 и коэффициента смещения инструмента x (рис. 5.5, стр. 59, [1]);
z_v1 := z_1/cos(δ_1) = 31.305
z_v1 := 28
z_v2 := z_2/cos(δ_2) = 125.22
z_v2 := 112
Y_FS1 := 3.75
Y_FS2 := 3.6
# Расчет выполняется для менее прочного зубчатого колеса, т. е. для того из колес, у которого отношение 𝜎𝐹𝑃 / 𝑌𝐹𝑆 меньше;
σ_FP1/Y_FS1 = 63.1373
σ_FP1 = 236.765
σ_FP2/Y_FS2 = 80.0654
σ_FP2 = 288.235
# Расчет ведем по колесу.
# Y_β – коэффициент, учитывающий наклон зуба; для прямозубых колес
Y_β := 1
Y_ε := 1
σ_F1 := K_F*Y_FS1*Y_β*Y_ε*F_t1/(0.85*b*m) = 44.7671  # МПа
# Предварительный расчет валов
# Из условия прочности на кручение определяется диаметры выходных концов валов по формуле:
d_в ≥ nthroot(T/(0.2*[τ]), 3)
# где [𝜏]𝑘 – допускаемое напряжение кручения для материала вала, [𝜏]𝑘=20 Н/мм2, если на конце вала зубчатое колесо;
#
# [𝜏]𝑘=25 Н/мм2 для быстроходного и промежуточного валов;
#
# Подставив значения, получим диаметры валов.
# Для быстроходного вала
T_2 = 43.1619
d_II := nthroot(T_2*1000/(0.2*20), 3) = 22.0977  # мм
# Полученное значение округляем и принимаем
d_II := 20  # мм
# Диаметр вала под подшипниками принимаем
d_II := 25  # мм
# Для быстроходного вала
d_III := nthroot(T_3*1000/(0.2*20), 3) = 30.7797  # мм
T_3 = 116.642
# Полученное значение округляем и принимаем
d_III := 30  # мм
# Диаметр вала под подшипниками принимаем
d_III := 35  # мм
d_IIII := nthroot(T_4*1000/(0.2*20), 3) = 38.192
d_IIII := 40
