# Расчет валов (решение задачи)
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# A | B
F_t1 := 1885.7  # H
L_1 := 0.098  # м
F_r1 := 1525.2332  # H
L_2 := 0.046  # м
F_a1 := 344.95  # H
L_3 := 0.100  # м
F_t2 := 1946.049  # H
F_r2 := 633.526  # H
F_a2 := 316.763  # H
d_w1 := 0.128  # м
d_w2 := 0.119875  # м
m_a1 := F_a1*d_w1/2 = 22.0768  # Hм
m_a2 := F_a2*d_w2/2 = 18.986  # Hм
T := 116.642  # Hм
# Опорные реакции и изгибающие моменты в вертикальной плоскости
# sum(M_A)=F_r1*L_1 - R_BВ*(L_1 + L_2) - F_r2*(L_1 + L_2 + L_3) + m_a1 + m_a2=0
R_BВ := (F_r1*L_1 - F_r2*(L_1 + L_2 + L_3) + m_a1 + m_a2)/(L_1 + L_2) = 249.69  # H
# sum(M_B)=R_AВ*(L_1 + L_2) - F_r1*L_2 - F_r2*L_3 + m_a1 + m_a2=0
R_AВ := (F_r1*L_2 + F_r2*L_3 - m_a1 - m_a2)/(L_1 + L_2) = 642.018  # H
# Проверка:
# sum(F_y)=R_BВ + R_AВ - F_r1 + F_r2 = 0
# Изгибающие моменты:
# M(0)= 0 | H*м
# M(L_1)1=-R_AВ*L_1 = -62.9177 | H*м
# M(L_1)2=-R_AВ*L_1 + F_r1*0 - m_a1 = -84.9945 | H*м
# M(L_1 + L_2)1=-R_AВ*(L_1 + L_2) + F_r1*L_2 - m_a1 = -44.3666
H*м
# M(L_1 + L_2)2=-R_AВ*(L_1 + L_2) + F_r1*L_2 - m_a1 - R_BВ*0 = -44.3666
H*м
# M(L_1 + L_2+L_3)=-R_AВ*(L_1 + L_2 + L_3) + F_r1*(L_2 + L_3) - m_a1 - R_BВ*L_3 = 18.986
H*м
# Опорные реакции и изгибающие моменты в горизонтальной плоскости
# sum(M_A)=F_t1*L_1 + F_t2*(L_1 + L_2 + L_3) - R_BГ*(L_1 + L_2)=0
R_BГ := (F_t1*L_1 + F_t2*(L_1 + L_2 + L_3))/(L_1 + L_2) = 4580.8  # H
# sum(M_B)=-F_t1*L_2 + F_t2*L_3 - R_AГ*(L_1 + L_2)=0
R_AГ := (-F_t1*L_2 + F_t2*L_3)/(L_1 + L_2) = 749.047  # H
# Проверка:
# sum(F_y)=-R_BГ + R_AГ + F_t2 + F_t1=0
# Изгибающие моменты:
F_t1*(L_2 + L_3) = 275.312
F_t1 = 1885.7
# M(0)= 0 | H*м
# M(L_1)1=R_AГ*L_1 = 73.4066 | H*м
# M(L_1)2=R_AГ*L_1 + F_t1*0 = 73.4066 | H*м
# M(L_1 + L_2)1=R_AГ*(L_1 + L_2) + F_t1*L_2 = 194.605 | H*м
# M(L_1 + L_2)2=R_AГ*(L_1 + L_2) + F_t1*L_2 + R_BГ*0 = 194.605
H*м
# M(L_1 + L_2+L_3)=R_AГ*(L_1 + L_2 + L_3) + F_t1*(L_2 + L_3) - R_BГ*L_3 = 1.13687e-13
H*м
# Суммарные изгибающие моменты:
M_c1 := sqrt(M_в1^2 + M_г1^2)
M_c1 := sqrt(0^2 + 0^2) = 0  # H*м
M_c2 := sqrt(M_в2^2 + M_г2^2)
M_c2 := sqrt((-62.918)^2 + 73.407^2) = 96.6812  # H*м
M_c3 := sqrt(M_в3^2 + M_г3^2)
M_c3 := sqrt((-84.995)^2 + 73.407^2) = 112.306  # H*м
M_c4 := sqrt(M_в4^2 + M_г4^2)
M_c4 := sqrt((-44.367)^2 + 194.605^2) = 199.598  # H*м
M_c5 := sqrt(M_в5^2 + M_г5^2)
M_c5 := sqrt((-44.367)^2 + 194.605^2) = 199.598  # H*м
M_c6 := sqrt(M_в6^2 + M_г6^2)
M_c6 := sqrt(18.986^2 + 0^2) = 18.986  # H*м
# Эквивалентные моменты:
M_экв1 := sqrt(0 + M_c1^2) = 0  # H*м
T = 116.642
M_экв2 := sqrt(0^2 + M_c2^2) = 96.6812  # H*м
M_экв3 := sqrt(T^2 + M_c3^2) = 161.92  # H*м
M_экв4 := sqrt(T^2 + M_c4^2) = 231.182  # H*м
M_экв5 := sqrt(T^2 + M_c5^2) = 231.182  # H*м
M_экв6 := sqrt(T^2 + M_c6^2) = 118.177  # H*м
# Определяем диаметр вала в самом нагруженном сечении, где эквивалентный момент максимален M_экв4 = 231.182
σ := 60  # МПа
d_KP := nthroot(M_экв4/(0.1*σ)*1000, 3) = 33.7754  # мм
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